# Данные:
# Трансформатор T1: | Трансформатор T2: | Трансформатор T4: | Турбогенератор G2: | Асинхроные двигатели:
S_nT1 := 40
S_nT2 := 6.3
S_nT4 := 80
P_nG2 := 60
P_nMA := 2.5
U_ВНT1 := 121
U_ВНT2 := 115
U_ВНT4 := 121
cosφ_G2 := 0.8
cosφ_MA := 0.91
U_kT1 := 10.5
U_kT2 := 10.5
U_kT4 := 10.5
U_nG2 := 6.3
U_nMA := 6
U_ННT1 := 10.5
U_ННT2 := 6.6
U_ННT4 := 6.3
x''_dG2 := 0.195
x_2G2 := 0.238
# Линии:
l_1 := 30
l_3 := 22
l_4 := 24
l_5 := 8
l_6 := 8
U_ср.ном1 := 115
U_ср.ном3 := 115
U_ср.ном4 := 115
U_ср.ном5 := 6.3
U_ср.ном6 := 6.3
# Нагрузки:
S_nS1 := 17
S_nS5 := 22
# Обобщёная нагрузка:
x''_d := 0.35
E'' := 0.85
S_б := 10
U_б := 10.5
x_0 := 0.4
# Решение:
I_б := S_б/(sqrt(3)*U_б) = 0.549857
Z_б := U_б^2/S_б = 11.025
# Трансформаторы: | Турбогенераторы:
# Т1:
x_1 := U_kT1/100*S_б/S_nT1 = 0.02625
# G2:
S_nG2 := P_nG2/cosφ_G2 = 75
Q_nG2 := P_nG2*tan(acos(cosφ_G2)) = 45
x_2 := x_1 = 0.02625
x_8 := x''_dG2*S_б/S_nG2 = 0.026
S_nG2 := sqrt(Q_nG2^2 + P_nG2^2) = 75
# Т2:
x_11 := U_kT2/100*S_б/S_nT2 = 0.166667
E_2 := 1.08
Q_nMA := P_nMA*tan(acos(cosφ_MA)) = 1.13903
x_12 := x_11 = 0.166667
P_nS1 := S_nS1*cosφ_MA = 15.47
# Т4:
x_7 := U_kT4/100*S_б/S_nT4 = 0.013125
Q_nS1 := P_nS1*tan(acos(cosφ_MA)) = 7.04834
x_9 := x_7 = 0.013125
# Асинхроные двигатели: | Линии:
# MA:
S_nMA := P_nMA/cosφ_MA = 2.74725
# W1:
x_5 := x_0*l_1*S_б/U_ср.ном1^2 = 0.00907372
l_1 = 30
x''_dMA := 0.2
U_ср.ном1 = 115
# W3:
x_4 := x_0*l_3*S_б/U_ср.ном3^2 = 0.00665406
x_15 := x''_dMA*S_б/S_nMA = 0.728
l_3 = 22
E_5 := 0.90
x_13 := x_15 = 0.728
# W4:
x_6 := x_0*l_4*S_б/U_ср.ном4^2 = 0.00725898
l_4 = 24
E_3 := E_5 = 0.9
# Нагрузки:
# W5:
x_10 := x_0*l_5*S_б/U_ср.ном5^2 = 0.806248
l_5 = 8
# S1:
x_3 := x''_d*S_б/S_nS1 = 0.205882
E_1 := 0.85
# W6:
x_14 := x_0*l_6*S_б/U_ср.ном6^2 = 0.806248
l_6 = 8
# S5:
x_17 := x''_d*S_б/S_nS5 = 0.159091
x_16 := x_0*l_6*S_б/U_ср.ном6^2 = 0.806248
E_4 := 0.85
# 3->4
x_18 := x_1*x_2/(x_1 + x_2) = 0.013125
x_19 := x_13*x_17/(x_13 + x_17) = 0.13056
x_20 := x_4 + x_6 + x_7*x_9/(x_7 + x_9) = 0.0204755
E_3 = 0.9
x_21 := x_5 + x_11*x_12/(x_11 + x_12) = 0.0924071
x_22 := x_14*x_16/(x_14 + x_16) = 0.403124
E_6 := (E_3*x_17 + E_4*x_13)/(x_13 + x_17) = 0.858967
E_4 = 0.85
# 4->5
x_23 := x_8 + x_20 + x_8*x_20/x_10 = 0.0471358
x_24 := x_10 + x_8 + x_10*x_8/x_20 = 1.85603
x_25 := x_20 + x_10 + x_20*x_10/x_8 = 1.46166
# 5->6
x_26 := x_21*x_25/(x_22 + x_21 + x_25) = 0.069011
x_27 := x_22*x_25/(x_22 + x_21 + x_25) = 0.301059
x_28 := x_22*x_21/(x_22 + x_21 + x_25) = 0.0190331
E_7 := E_2 = 1.08
E_8 := E_2 = 1.08
# 6->7
x_29 := x_3*x_23/(x_3 + x_23) = 0.0383547
x_31 := x_27 + x_24*x_19/(x_24 + x_19) = 0.423038
x_30 := x_28 + x_15 = 0.747033
E_1 = 0.85
E_7 = 1.08
E_9 := (E_1*x_23 + E_7*x_3)/(x_23 + x_3) = 1.03715
E_10 := (E_6*x_24 + E_8*x_19)/(x_24 + x_19) = 0.873493
E_6 = 0.858967
# 7->8
E_8 = 1.08
x_32 := x_26 + x_30*x_31/(x_30 + x_31) = 0.3391
E_11 := (E_10*x_30 + E_5*x_31)/(x_30 + x_31) = 0.883077
x_19 = 0.13056
x_24 = 1.85603
# 8->9
x_30 = 0.747033
x_33 := x_18 + x_29*x_32/(x_29 + x_32) = 0.0475823
E_12 := (E_9*x_32 + E_11*x_29)/(x_32 + x_29) = 1.0215
x_29 = 0.0383547
E_9 = 1.03715
E_9 = 1.03715
E_11 = 0.883077
x_32 = 0.3391
E_11 = 0.883077
I'' := E_12/x_33*I_б = 11.8043
x_1 = 0.02625
x_12 = 0.166667
x_23 = 0.0471358
# Трансформаторы:
# Турбогенераторы:
# Нагрузки:
x_2 = 0.02625
x_13 = 0.728
x_24 = 1.85603
# Т1:
xr_T1 := round((40*17/30 + 40*20/60)/2) = 18
# G2:
xr_G2 := round(60*85/100) = 51
# S:
xr_S := 2.5
(40*17/30 + 40*20/60)/2 = 18
x_3 = 0.205882
x_14 = 0.806248
x_25 = 1.46166
x_4 = 0.00665406
x_15 = 0.728
x_26 = 0.069011
r_1 := x_1/xr_T1
r_2 := r_1 = 0.00145833
r_8 := x_8/xr_G2 = 0.000509804
# S1:
r_3 := x_3/xr_S = 0.0823529
x_5 = 0.00907372
x_16 = 0.806248
x_27 = 0.301059
x_6 = 0.00725898
x_17 = 0.159091
x_28 = 0.0190331
# Т2:
xr_T2 := 7
# Линии:
# S5:
r_17 := x_17/xr_S = 0.0636364
round((6.3*7/5 + 6.3*17/30)/2)
x_7 = 0.013125
x_18 = 0.013125
x_29 = 0.0383547
# W:
xr_W := (2 + 8)/2 = 5
x_8 = 0.026
x_19 = 0.13056
x_30 = 0.747033
r_11 := x_11/xr_T2
r_12 := r_11 = 0.0238095
x_9 = 0.013125
x_20 = 0.0204755
x_31 = 0.423038
# W1:
r_5 := x_5/xr_W = 0.00181474
x_3 = 0.205882
500 - 60 = 440
x_10 = 0.806248
x_21 = 0.0924071
x_32 = 0.3391
# Т4:
xr_T4 := round(20 + 20*30/440) = 21
x_11 = 0.166667
x_22 = 0.403124
x_33 = 0.0475823
# W3:
r_4 := x_4/xr_W = 0.00133081
x_17 = 0.159091
50 - 20 = 30
r_7 := x_7/xr_T4
r_9 := r_7 = 0.000625
# W4:
r_6 := x_6/xr_W = 0.0014518
20 + 20*30/440 = 21.3636
# Асинхроные двигатели:
# MA:
xr_MA := 40
# W5:
r_10 := x_10/xr_W = 0.16125
r_13 := x_13/xr_MA
r_15 := r_13 = 0.0182
# W6:
r_14 := r_10 = 0.16125
r_16 := r_14 = 0.16125
# 3->4
r_18 := r_1*r_2/(r_1 + r_2) = 0.000729167
r_19 := r_13*r_17/(r_13 + r_17) = 0.0141524
r_20 := r_4 + r_6 + r_7*r_9/(r_7 + r_9) = 0.00309511
r_21 := r_5 + r_11*r_12/(r_11 + r_12) = 0.0137195
r_22 := r_14*r_16/(r_14 + r_16) = 0.0806248
# 4->5
r_23 := r_8 + r_20 + r_8*r_20/r_10 = 0.0036147
r_24 := r_10 + r_8 + r_10*r_8/r_20 = 0.188319
r_25 := r_20 + r_10 + r_20*r_10/r_8 = 1.14332
# 5->6
r_26 := r_21*r_25/(r_22 + r_21 + r_25) = 0.0126737
r_27 := r_22*r_25/(r_22 + r_21 + r_25) = 0.074479
r_28 := r_22*r_21/(r_22 + r_21 + r_25) = 0.000893726
# 6->7
r_29 := r_3*r_23/(r_3 + r_23) = 0.00346271
r_31 := r_27 + r_24*r_19/(r_24 + r_19) = 0.0876422
r_30 := r_28 + r_15 = 0.0190937
# 7->8
r_32 := r_26 + r_30*r_31/(r_30 + r_31) = 0.0283518
# 8->9
r_33 := r_18 + r_29*r_32/(r_29 + r_32) = 0.00381499
r_1 = 0.00145833
r_12 = 0.0238095
r_23 = 0.0036147
r_2 = 0.00145833
r_13 = 0.0182
r_24 = 0.188319
r_3 = 0.0823529
r_14 = 0.16125
r_25 = 1.14332
r_4 = 0.00133081
r_15 = 0.0182
r_26 = 0.0126737
r_5 = 0.00181474
r_16 = 0.16125
r_27 = 0.074479
f := 50
r_6 = 0.0014518
r_17 = 0.0636364
r_28 = 0.000893726
ω := 2*π*f = 314.159
r_7 = 0.000625
r_18 = 0.000729167
r_29 = 0.00346271
x_33 = 0.0475823
r_8 = 0.000509804
r_19 = 0.0141524
r_30 = 0.0190937
Ta := x_33/(ω*r_33) = 0.0397011
r_9 = 0.000625
r_20 = 0.00309511
r_31 = 0.0876422
r_10 = 0.16125
r_21 = 0.0137195
r_32 = 0.0283518
r_11 = 0.0238095
r_22 = 0.0806248
r_33 = 0.00381499
k_y := 1 + e^(-0.01/Ta) = 1.77734
E_3 = 0.9
x_13 = 0.728
i_y := k_y*sqrt(2)*I'' = 29.6706
I_б = 0.549857
I_y := I''*sqrt(1 + 2*(k_y - 1)^2) = 17.5424
U_ННT1 = 10.5
S'' := sqrt(3)*I''*U_ННT1 = 214.68
# Вторая часть
# Прямая
x_17 := x_10 + x_14*x_16/(x_14 + x_16) + x_11*x_12/(x_11 + x_12) + x_5 + x_4 + x_6 = 1.31569
x_8 = 0.026
x_18 := x_7*x_9/(x_7 + x_9) = 0.0065625
x_19 := x_18*x_17/(x_18 + x_17) + x_8 = 0.0325299
x_1rez := x_19 = 0.0325299
x1_G2 := x_8 = 0.026
x_4 = 0.00665406
x_11 = 0.166667
# Обратная
x_5 = 0.00907372
x_12 = 0.166667
x_6 = 0.00725898
x_14 = 0.806248
S_nG2 := P_nG2/cosφ_G2 = 75
x_8 := x_2G2*S_б/S_nG2 = 0.0317333
x_2G2 = 0.238
x_2G2 := x_8 = 0.0317333
x_7 = 0.013125
x_16 = 0.806248
x_8 = 0.0317333
x_17 = 1.31569
S_б = 10
S_nG2 = 75
x_9 = 0.013125
x_18 = 0.0065625
x_17 := x_10 + x_14*x_16/(x_14 + x_16) + x_11*x_12/(x_11 + x_12) + x_5 + x_4 + x_6 = 1.31569
x_10 = 0.806248
x_19 = 0.0325299
x_18 := x_7*x_9/(x_7 + x_9) = 0.0065625
x_19 := x_18*x_17/(x_18 + x_17) + x_8 = 0.0382633
x_2rez := x_19
x2_G2 := x_8 = 0.0317333
# Нулевая
x_5 := 3*x_5 = 0.0272212
x_4 := 3*x_4 = 0.0199622
x_6 := 3*x_6 = 0.0217769
x_13 := x_7*x_9/(x_7 + x_9) = 0.0065625
x_14 := x_5 + x_4 + x_6 + x_11*x_12/(x_11 + x_12) = 0.152294
x_15 := x_14*x_13/(x_14 + x_13) = 0.0062914
x_0rez := x_15
x_1rez = 0.0325299
x_2rez = 0.0382633
x_0rez = 0.0062914
S_nG2 = 75
x_Δ := x_2rez*x_0rez/(x_2rez + x_0rez) = 0.00540301
S_б = 10
x_расч := (x_1rez + x_Δ)/1*S_nG2/S_б = 0.284497
t := 1.7
I_pt := 2.22
I_nomG2 := S_nG2/(sqrt(3)*115)*1000 = 376.533
I_1pt := I_pt*I_nomG2 = 835.903
Вд
I_A1 := I_1pt = 835.903
x_0rez = 0.0062914
x_2rez = 0.0382633
I_A2 := -x_0rez/(x_0rez + x_2rez)*I_A1 = -118.035
I_A0 := -x_2rez/(x_0rez + x_2rez)*I_A1 = -717.868
a := e^((1j*120)°) → e^(120i*°) = -0.5 + 0.866025i
a^2 = -0.5 - 0.866025i
I_B1 := a^2*I_A1 = -417.951 - 723.913i
I_B1 = -417.951 - 723.913i
(118.035 ∠ -60°) + (118.035 ∠ 120°) = 4.26326e-14 + 1.42109e-14i
I_C1 := a*I_A1 = -417.951 + 723.913i
I_C1 = -417.951 + 723.913i
I_B2 := a*I_A2 = 59.0174 - 102.221i
I_B2 = 59.0174 - 102.221i
atan(102.221/59.017) = 60.0001 deg
I_C2 := a^2*I_A2 = 59.0174 + 102.221i
I_C2 = 59.0174 + 102.221i
I_B0 := I_A0 = -717.868
I_C0 := I_A0 = -717.868
I_A := I_A1 + I_A2 + I_A0 = 0
I_A0 = -717.868
I_B := I_B1 + I_B2 + I_B0 = -1076.8 - 826.134i
I_B = -1076.8 - 826.134i
I_C := I_C1 + I_C2 + I_C0 = -1076.8 + 826.134i
I_C = -1076.8 + 826.134i
m := sqrt(3)*sqrt(1 - x_2rez*x_0rez/(x_0rez + x_2rez)^2) = 1.62364
x_2rez = 0.0382633
x_0rez = 0.0062914
I_pt := m*I_A1 = 1357.2
ВД_U_кз
U_б := 115
Z_б := U_б^2/S_б = 1322.5
S_б = 10
I_A0 = -717.868
x_Δ := x_Δ*Z_б = 7.14548
U_A1 := I_A1*x_Δ*1j = 5972.93i
U_A1 = 5972.93i
U_A2 := U_A1 = 5972.93i
U_A0 := U_A1 = 5972.93i
U_A := 3*U_A1 = 17918.8i
U_B := a^2*U_A1 + a*U_A2 + U_A0 = -1.81899e-12
a^2 = -0.5 - 0.866025i
U_C := a*U_A1 + a^2*U_A2 + U_A0 = -1.81899e-12
a = -0.5 + 0.866025i
ВД_I_U_G
I_1G2 := I_1pt = 835.903
I_A1 = 835.903
I_2G2 := I_A2 = -118.035
I_0G2 := I_A0 = -717.868
Z_б = 1322.5
x_1G2 := Z_б*(x_1rez - x1_G2) = 8.63583
x_1rez = 0.0325299
x1_G2 = 0.026
x_2G2 := Z_б*(x_2rez - x2_G2) = 8.63583
x_2rez = 0.0382633
x2_G2 = 0.0317333
dU_A1G2 := 1j*x_1G2*I_1G2 = 7218.72i
dU_A2G2 := 1j*x_2G2*I_2G2 = -1019.33i
U_A1 := U_A1 + dU_A1G2 = 13191.6i
U_A2 := U_A2 + dU_A2G2 = 4953.6i
I
U_B1 := U_A1*a^2 = 5172.71 - 2986.46i
K_T := 121/6.3 = 19.2063
n := 11
I_A1 = 835.903
I_A2 = -118.035
U_B2 := U_A2*a = -5172.71 - 2986.46i
U_C1 := U_A1*a = -11424.3 - 6595.82i
I_aG2 := (I_A1*e^(-1j*π/6*n) + I_A2*e^(1j*π/6*n))*K_T = 11940.4 + 9160.83i
I_aG2 = 11940.4 + 9160.83i
U_C2 := U_A2*a^2 = 4289.94 - 2476.8i
I_bG2 := (a^2*I_A1*e^(-1j*π/6*n) + a*I_A2*e^(1j*π/6*n))*K_T = -18321.7i
I_bG2 = -18321.7i
I_cG2 := (a*I_A1*e^(-1j*π/6*n) + a^2*I_A2*e^(1j*π/6*n))*K_T = -11940.4 + 9160.83i
I_cG2 = -11940.4 + 9160.83i
U_aG2 := (U_A1*e^(-1j*π/6*n) + U_A2*e^(1j*π/6*n))*1/K_T = -214.461 + 818.18i
U_aG2 = -214.461 + 818.18i
U_bG2 := (a^2*U_A1*e^(-1j*π/6*n) + a*U_A2*e^(1j*π/6*n))*1/K_T = 428.923
U_bG2 = 428.923
U_cG2 := (a*U_A1*e^(-1j*π/6*n) + a^2*U_A2*e^(1j*π/6*n))*1/K_T = -214.461 - 818.18i
U_cG2 = -214.461 - 818.18i
I_A1 = 835.903
U_A1 = 13191.6i
I_A2 = -118.035
U_A2 = 4953.6i
a^2*U_A1*e^(-1j*π/6*n) = 13191.6
a*U_A2*e^(1j*π/6*n) = -4953.6
IKA1 := (I_aG2 + a*I_bG2 + a^2*I_cG2)/3 = 13903.7 + 8027.32i
IKA2 := (I_aG2 + a^2*I_bG2 + a*I_cG2)/3 = -1963.29 + 1133.51i
IKA0 := (I_aG2 + I_bG2 + I_cG2)/3 = -2.42532e-12 + 1.21266e-12i
UKA1 := (U_aG2 + a*U_bG2 + a^2*U_cG2)/3 = -343.419 + 594.819i
UKA2 := (U_aG2 + a^2*U_bG2 + a*U_cG2)/3 = 128.957 + 223.361i
UKA0 := (U_aG2 + U_bG2 + U_cG2)/3 = -1.04213e-13 - 7.57912e-14i
